# WSe2 system
# By: Xu, Zhang
# Data July 01, 2019
#==================================================
# Initialize the program
clear

# Set simulation box properties
boundary        p p p
units           metal
atom_style      atomic
processors      1 1 1

# Other settings
neighbor        2.0 bin
neigh_modify    every 10 delay 10
timestep        1

#Retrieve atom information
box             tilt large
read_data       1.data
#Atom notation
#1 Se

#==================================================
#Force field definition
pair_style      tersoff
pair_coeff      * * WSe.tersoff W Se

#==================================================
#Variables are defined here
variable        PotentialEnergyStep equal 1
#==================================================
#Here begins the simulations
#define a global calculation for the potential energy
thermo_style    custom pe
thermo          ${PotentialEnergyStep}
variable        eng_atom equal pe
run             0
print           "Predictions ${eng_atom}"

#==================================================
# Initialize the program
clear

# Set simulation box properties
boundary        p p p
units           metal
atom_style      atomic
processors      1 1 1

# Other settings
neighbor        2.0 bin
neigh_modify    every 10 delay 10
timestep        1

#Retrieve atom information
box             tilt large
read_data       2.data
#Atom notation
#1 Se

#==================================================
#Force field definition
pair_style      tersoff
pair_coeff      * * WSe.tersoff W Se

#==================================================
#Variables are defined here
variable        PotentialEnergyStep equal 1
#==================================================
#Here begins the simulations
#define a global calculation for the potential energy
thermo_style    custom pe
thermo          ${PotentialEnergyStep}
variable        eng_atom equal pe
run             0
print           "Predictions ${eng_atom}"

#==================================================
# Initialize the program
clear

# Set simulation box properties
boundary        p p p
units           metal
atom_style      atomic
processors      1 1 1

# Other settings
neighbor        2.0 bin
neigh_modify    every 10 delay 10
timestep        1

#Retrieve atom information
box             tilt large
read_data       3.data
#Atom notation
#1 Se

#==================================================
#Force field definition
pair_style      tersoff
pair_coeff      * * WSe.tersoff W Se

#==================================================
#Variables are defined here
variable        PotentialEnergyStep equal 1
#==================================================
#Here begins the simulations
#define a global calculation for the potential energy
thermo_style    custom pe
thermo          ${PotentialEnergyStep}
variable        eng_atom equal pe
run             0
print           "Predictions ${eng_atom}"

#==================================================
# Initialize the program
clear

# Set simulation box properties
boundary        p p p
units           metal
atom_style      atomic
processors      1 1 1

# Other settings
neighbor        2.0 bin
neigh_modify    every 10 delay 10
timestep        1

#Retrieve atom information
box             tilt large
read_data       4.data
#Atom notation
#1 Se

#==================================================
#Force field definition
pair_style      tersoff
pair_coeff      * * WSe.tersoff W Se

#==================================================
#Variables are defined here
variable        PotentialEnergyStep equal 1
#==================================================
#Here begins the simulations
#define a global calculation for the potential energy
thermo_style    custom pe
thermo          ${PotentialEnergyStep}
variable        eng_atom equal pe
run             0
print           "Predictions ${eng_atom}"

#==================================================
# Initialize the program
clear

# Set simulation box properties
boundary        p p p
units           metal
atom_style      atomic
processors      1 1 1

# Other settings
neighbor        2.0 bin
neigh_modify    every 10 delay 10
timestep        1

#Retrieve atom information
box             tilt large
read_data       5.data
#Atom notation
#1 Se

#==================================================
#Force field definition
pair_style      tersoff
pair_coeff      * * WSe.tersoff W Se

#==================================================
#Variables are defined here
variable        PotentialEnergyStep equal 1
#==================================================
#Here begins the simulations
#define a global calculation for the potential energy
thermo_style    custom pe
thermo          ${PotentialEnergyStep}
variable        eng_atom equal pe
run             0
print           "Predictions ${eng_atom}"

#==================================================
# Initialize the program
clear

# Set simulation box properties
boundary        p p p
units           metal
atom_style      atomic
processors      1 1 1

# Other settings
neighbor        2.0 bin
neigh_modify    every 10 delay 10
timestep        1

#Retrieve atom information
box             tilt large
read_data       6.data
#Atom notation
#1 Se

#==================================================
#Force field definition
pair_style      tersoff
pair_coeff      * * WSe.tersoff W Se

#==================================================
#Variables are defined here
variable        PotentialEnergyStep equal 1
#==================================================
#Here begins the simulations
#define a global calculation for the potential energy
thermo_style    custom pe
thermo          ${PotentialEnergyStep}
variable        eng_atom equal pe
run             0
print           "Predictions ${eng_atom}"

#==================================================
# Initialize the program
clear

# Set simulation box properties
boundary        p p p
units           metal
atom_style      atomic
processors      1 1 1

# Other settings
neighbor        2.0 bin
neigh_modify    every 10 delay 10
timestep        1

#Retrieve atom information
box             tilt large
read_data       7.data
#Atom notation
#1 Se

#==================================================
#Force field definition
pair_style      tersoff
pair_coeff      * * WSe.tersoff W Se

#==================================================
#Variables are defined here
variable        PotentialEnergyStep equal 1
#==================================================
#Here begins the simulations
#define a global calculation for the potential energy
thermo_style    custom pe
thermo          ${PotentialEnergyStep}
variable        eng_atom equal pe
run             0
print           "Predictions ${eng_atom}"

#==================================================
# Initialize the program
clear

# Set simulation box properties
boundary        p p p
units           metal
atom_style      atomic
processors      1 1 1

# Other settings
neighbor        2.0 bin
neigh_modify    every 10 delay 10
timestep        1

#Retrieve atom information
box             tilt large
read_data       8.data
#Atom notation
#1 Se

#==================================================
#Force field definition
pair_style      tersoff
pair_coeff      * * WSe.tersoff W Se

#==================================================
#Variables are defined here
variable        PotentialEnergyStep equal 1
#==================================================
#Here begins the simulations
#define a global calculation for the potential energy
thermo_style    custom pe
thermo          ${PotentialEnergyStep}
variable        eng_atom equal pe
run             0
print           "Predictions ${eng_atom}"

#==================================================
# Initialize the program
clear

# Set simulation box properties
boundary        p p p
units           metal
atom_style      atomic
processors      1 1 1

# Other settings
neighbor        2.0 bin
neigh_modify    every 10 delay 10
timestep        1

#Retrieve atom information
box             tilt large
read_data       9.data
#Atom notation
#1 Se

#==================================================
#Force field definition
pair_style      tersoff
pair_coeff      * * WSe.tersoff W Se

#==================================================
#Variables are defined here
variable        PotentialEnergyStep equal 1
#==================================================
#Here begins the simulations
#define a global calculation for the potential energy
thermo_style    custom pe
thermo          ${PotentialEnergyStep}
variable        eng_atom equal pe
run             0
print           "Predictions ${eng_atom}"

#==================================================
# Initialize the program
clear

# Set simulation box properties
boundary        p p p
units           metal
atom_style      atomic
processors      1 1 1

# Other settings
neighbor        2.0 bin
neigh_modify    every 10 delay 10
timestep        1

#Retrieve atom information
box             tilt large
read_data       10.data
#Atom notation
#1 Se

#==================================================
#Force field definition
pair_style      tersoff
pair_coeff      * * WSe.tersoff W Se

#==================================================
#Variables are defined here
variable        PotentialEnergyStep equal 1
#==================================================
#Here begins the simulations
#define a global calculation for the potential energy
thermo_style    custom pe
thermo          ${PotentialEnergyStep}
variable        eng_atom equal pe
run             0
print           "Predictions ${eng_atom}"

#==================================================
# Initialize the program
clear

# Set simulation box properties
boundary        p p p
units           metal
atom_style      atomic
processors      1 1 1

# Other settings
neighbor        2.0 bin
neigh_modify    every 10 delay 10
timestep        1

#Retrieve atom information
box             tilt large
read_data       11.data
#Atom notation
#1 Se

#==================================================
#Force field definition
pair_style      tersoff
pair_coeff      * * WSe.tersoff W Se

#==================================================
#Variables are defined here
variable        PotentialEnergyStep equal 1
#==================================================
#Here begins the simulations
#define a global calculation for the potential energy
thermo_style    custom pe
thermo          ${PotentialEnergyStep}
variable        eng_atom equal pe
run             0
print           "Predictions ${eng_atom}"
