# WSe2 system
# By: Xu, Zhang
# Data July 01, 2019
#==================================================
# Initialize the program
clear

# Set simulation box properties
boundary        p p p
units           metal
atom_style      atomic
processors      1 1 1

# Other settings
neighbor        2.0 bin
neigh_modify    every 10 delay 10
timestep        0.001

#Retrieve atom information
box             tilt large
read_data       WSe2supercell.data
#Atom notation
#1 W
#2 Se

#==================================================
#Force field definition
pair_style      tersoff
pair_coeff      * * WSe.tersoff W Se

#==================================================
#Variables are defined here
variable        MinimizeThermo  equal 1
variable        MinimizeDump    equal 1
variable        MinimizeStep    equal 1000
variable        NVTThermo       equal 100
variable        NVTDump         equal 100
variable        NVTT1Step       equal 10000
variable        NVTT2Step       equal 10000
variable        T1              equal 300
#==================================================
#Here begins the simulations
#Compute the root mean-square displacement
compute         c1 all msd
variable        rmsd equal sqrt(c_c1[4])
#define a global calculation for the potential energy
thermo_style    custom step pe v_rmsd
thermo          ${MinimizeThermo}
dump            d1 all custom ${MinimizeDump} minimize.dump id type x y z
minimize        1e-6 1e-6 ${MinimizeStep} ${MinimizeStep}
undump          d1

#room temperature stability
reset_timestep  0
neigh_modify    every 10 delay 10
velocity        all create ${T1} 4999 dist gaussian
thermo_style    custom step temp press pe v_rmsd
thermo          ${NVTThermo}
fix             f1 all npt temp ${T1} ${T1} 0.1 x 1 1 1 y 1 1 1
fix             f2 all momentum 1 linear 1 1 1
fix             f3 all ave/time ${NVTThermo} ${NVTThermo} ${NVTT1Step} v_rmsd mode scalar
dump            d1 all custom ${NVTDump} wse2_npt.dump id type x y z
run             ${NVTT1Step}
unfix           f1
unfix           f2
variable        rmsd_lowT0 equal f_f3
variable        rmsd_lowT equal ${rmsd_lowT0}
print           "Predictions ${rmsd_lowT}"
unfix           f3
undump          d1
